<?xml-stylesheet type="text/xsl" href="http://jsbsim.sourceforge.net/JSBSim.xsl"?>

<fdm_config
	name="SudAviation-Caravelle"
	version="2.0"
	release="ALPHA"
	xmlns:xsi="http://www.w3.org/2001/XMLSchema-instance"
	xsi:noNamespaceSchemaLocation="http://jsbsim.sourceforge.net/JSBSim.xsd"
>

	<fileheader>
		<author>Israel Hernandez, IAHM-COL</author>
		<author>Peter Brendt, JWocky</author>
		<filecreationdate>07/05/2020</filecreationdate>
		<version>$Revision: 3.01 $</version>
		<description>SudAviation Caravelle FDM. License: GPL 3.0+</description>
	</fileheader>

	<!--
		File:     SudAviation-Caravelle.xml

		Inputs:
			name:         SudAviation-Caravelle
			type:          Multi-engine Passenger Jet Airliner, Transonic Jet Transport
			stall speed:  95.00kts
			max weight: 101410.00 lb
			length:        32 m
			wing:
				span:            35 m
				area:           146.7 sq-m
				mean chord:   24 m
				aspect ratio:    8.00:1
				taper ratio:      5.11:1
				incidence:      4.00 degrees
				dihedral:        3.00 degrees
				sweep:        20.00 degrees

			no. engines:   2
			engine type:   Turbine Engine
			engine layout: aft fuselage

			control type:   Conventional Controls

			gear type:     tricycle
			steering type: steering
			retractable?:  yes
	-->

	<metrics>
		<wingarea unit="FT2">1553.0657</wingarea>
		<wingspan unit="FT">112.5328</wingspan>
		<wing_incidence unit="DEG">4.00</wing_incidence>
	   	<chord unit="FT">16.4042</chord>
		<htailarea unit="FT2">326.1465</htailarea>
		<htailarm unit="FT">46.2008</htailarm>
		<vtailarea unit="FT2">184.27815</vtailarea>
		<vtailarm unit="FT">63.1693</vtailarm>

		<location name="AERORP" unit="M">
		  <x>18.14852</x>
		  <y>0.00</y>
		  <z>-0.01675</z>
		</location>

		<location name="EYEPOINT" unit="M">
			<x>1.48991</x>
			<y>-0.45118</y>
			<z>0.77092</z>
		</location>

		<location name="VRP" unit="M">
			<x>0.00</x>
			<y>0.00</y>
			<z>0.5345</z>
		</location>
	</metrics>

	<mass_balance>
		<ixx unit="SLUG*FT2">2162121</ixx>
		<iyy unit="SLUG*FT2">3931332</iyy>
		<izz unit="SLUG*FT2">5903289</izz>
		<emptywt unit="LBS" >66260</emptywt>

		<location name="CG" unit="M">
			<x>17.63819</x>
			<y>0.00</y>
			<z>-0.01675</z>
		</location>

	        <!-- cargo, passengers, and crew as pointmasses -->
		<!-- cockpit crew, asymetric because of 3 persons -->
		<pointmass name="Captain">
			<weight unit="LBS">124.44098</weight>
			<location name="Captain" unit="M">
				<x>3.6631913</x>
				<y>-0.8380443</y>
				<z>0.5152637</z>
			</location>
		</pointmass>

		<pointmass name="FirstOfficer">
			<weight unit="LBS">133.63101</weight>
			<location name="FirstOfficer" unit="M">
				<x>3.6631913</x>
				<y>0.7419441</y>
				<z>0.5152637</z>
			</location>
		</pointmass>

		<pointmass name="Engineer">
			<weight unit="LBS">132.03898</weight>
			<location name="Engineer" unit="M">
				<x>4.2267842</x>
				<y>1.0662913</y>
				<z>0.5441659</z>
			</location>
		</pointmass>

		<pointmass name="Steward.1">
			<weight unit="LBS">142.40375</weight>
			<location name="Steward.1" unit="M">
				<x>6.1825018</x>
				<y>0.6134898</y>
				<z>0.3225822</z>
			</location>
		</pointmass>

		<pointmass name="Steward.2">
			<weight unit="LBS">138.20019</weight>
			<location name="Steward.2" unit="M">
				<x>6.1825018</x>
				<y>-0.6803095</y>
				<z>0.3225822</z>
			</location>
		</pointmass>

		<pointmass name="Steward.3">
			<weight unit="LBS">145.16145</weight>
			<location name="Steward.3" unit="M">
				<x>24.7852058</x>
				<y>0.6404023</y>
				<z>0.4103594</z>
			</location>
		</pointmass>

		<!-- PAX 1st Class -->
		<pointmass name="passenger.1">
			<weight unit="LBS">137.98139</weight>
			<location name="ClassFirst.1" unit="M">
				<!-- 1WR -->
				<x>8.2438374</x>
				<y>1.22031545</y>
				<z>0.3225822</z>
			</location>
		</pointmass>

		<pointmass name="passenger.2">
			<weight unit="LBS">121.47272</weight>
			<location name="ClassFirst.2" unit="M">
				<!-- 1AR -->
				<x>8.2438364</x>
				<y>0.6931183</y>
				<z>0.3225822</z>
			</location>
		</pointmass>

		<pointmass name="passenger.3">
			<weight unit="LBS">118.05601</weight>
			<location name="ClassFirst.3" unit="M">
				<!-- 1AL -->
				<x>8.2438374</x>
				<y>-0.6931183</y>
				<z>0.3225822</z>
			</location>
		</pointmass>

		<pointmass name="passenger.4">
			<weight unit="LBS">125.71939</weight>
			<location name="ClassFirst.4" unit="M">
				<!-- 1WL -->
				<x>8.2438364</x>
				<y>-1.22031545</y>
				<z>0.3225822</z>
			</location>
		</pointmass>

		<pointmass name="passenger.5">
			<weight unit="LBS">104.05781</weight>
			<location name="ClassFirst.5" unit="M">
				<!-- 1WR -->
				<x>9.3611221</x>
				<y>1.22031545</y>
				<z>0.3225822</z>
			</location>
		</pointmass>

		<pointmass name="passenger.6">
			<weight unit="LBS">143.90824</weight>
			<location name="ClassFirst.6" unit="M">
				<!-- 1AR -->
				<x>9.3611221</x>
				<y>0.6931183</y>
				<z>0.3225822</z>
			</location>
		</pointmass>

		<pointmass name="passenger.7">
			<weight unit="LBS">124.88726</weight>
			<location name="ClassFirst.7" unit="M">
				<!-- 1AL -->
				<x>9.3611231</x>
				<y>-0.6931183</y>
				<z>0.3225822</z>
			</location>
		</pointmass>

		<pointmass name="passenger.8">
			<weight unit="LBS">110.49392</weight>
			<location name="ClassFirst.8" unit="M">
				<!-- 1WL -->
				<x>9.3611221</x>
				<y>-1.22031545</y>
				<z>0.3225822</z>
			</location>
		</pointmass>

		<pointmass name="passenger.9">
			<weight unit="LBS">127.86019</weight>
			<location name="ClassFirst.9" unit="M">
				<!-- 1WR -->
				<x>10.4650249</x>
				<y>1.22031545</y>
				<z>0.3225822</z>
			</location>
		</pointmass>

		<pointmass name="passenger.10">
			<weight unit="LBS">144.15553</weight>
			<location name="ClassFirst.10" unit="M">
				<!-- 1AR -->
				<x>10.4650259</x>
				<y>0.6931183</y>
				<z>0.3225822</z>
			</location>
		</pointmass>

		<pointmass name="passenger.11">
			<weight unit="LBS">141.87166</weight>
			<location name="ClassFirst.11" unit="M">
				<!-- 1AL -->
				<x>10.4650269</x>
				<y>-0.6931183</y>
				<z>0.3225822</z>
			</location>
		</pointmass>

		<pointmass name="passenger.12">
			<weight unit="LBS">125.4944</weight>
			<location name="ClassFirst.12" unit="M">
				<!-- 1WL -->
				<x>10.4650249</x>
				<y>-1.22031545</y>
				<z>0.3225822</z>
			</location>
		</pointmass>

		<!-- PAX Tourist class -->
		<!-- row 4 -->
		<pointmass name="passenger.13">
			<weight unit="LBS">105.14392</weight>
			<location name="ClassTourist.1" unit="M">
				<!-- 3WR -->
				<x>11.9053917</x>
				<y>1.2401263</y>
				<z>0.3225822</z>
			</location>
		</pointmass>

		<pointmass name="passenger.14">
			<weight unit="LBS">143.37847</weight>
			<location name="ClassTourist.2" unit="M">
				<!-- 3MR -->
				<x>11.9053917</x>
				<y>0.7825081</y>
				<z>0.3225821</z>
			</location>
		</pointmass>

		<pointmass name="passenger.15">
			<weight unit="LBS">144.91988</weight>
			<location name="ClassTourist.3" unit="M">
				<!-- 3AR -->
				<x>11.9053936</x>
				<y>0.3409482</y>
				<z>0.3225821</z>
			</location>
		</pointmass>

		<pointmass name="passenger.16">
			<weight unit="LBS">111.6851</weight>
			<location name="ClassTourist.63" unit="M">
				<!-- 3AL -->
				<x>11.8973627</x>
				<y>-0.8873981</y>
				<z>0.3225821</z>
			</location>
		</pointmass>

		<pointmass name="passenger.17">
			<weight unit="LBS">131.87657</weight>
			<location name="ClassTourist.64" unit="M">
				<!-- 3WL -->
				<x>11.8973637</x>
				<y>-1.2807891</y>
				<z>0.3225821</z>
			</location>
		</pointmass>

		<!-- row 5 -->
		<pointmass name="passenger.18">
			<weight unit="LBS">133.98133</weight>
			<location name="ClassTourist.4" unit="M">
				<!-- 3WR -->
				<x>12.7965412</x>
				<y>1.2401263</y>
				<z>0.3225821</z>
			</location>
		</pointmass>

		<pointmass name="passenger.19">
			<weight unit="LBS">99.69366</weight>
			<location name="ClassTourist.5" unit="M">
				<!-- 3MR -->
				<x>12.7965412</x>
				<y>0.7825081</y>
				<z>0.322582</z>
			</location>
		</pointmass>

		<pointmass name="passenger.20">
			<weight unit="LBS">130.71013</weight>
			<location name="ClassTourist.6" unit="M">
				<!-- 3AR -->
				<x>12.7965412</x>
				<y>0.3409482</y>
				<z>0.322582</z>
			</location>
		</pointmass>

		<pointmass name="passenger.21">
			<weight unit="LBS">147.51406</weight>
			<location name="ClassTourist.7" unit="M">
				<!-- 3AL -->
				<x>12.7885122</x>
				<y>-0.8873981</y>
				<z>0.322582</z>
			</location>
		</pointmass>

		<pointmass name="passenger.22">
			<weight unit="LBS">122.94841</weight>
			<location name="ClassTourist.8" unit="M">
				<!-- 3WL -->
				<x>12.7885113</x>
				<y>-1.2807891</y>
				<z>0.3225821</z>
			</location>
		</pointmass>

		<!-- row 6 -->
		<pointmass name="passenger.23">
			<weight unit="LBS">206.5594</weight>
			<location name="ClassTourist.9" unit="M">
				<!-- 3WR -->
				<x>13.6796665</x>
				<y>1.2401263</y>
				<z>0.3225821</z>
			</location>
		</pointmass>

		<pointmass name="passenger.24">
			<weight unit="LBS">119.52815</weight>
			<location name="ClassTourist.10" unit="M">
				<!-- 3MR -->
				<x>13.6796627</x>
				<y>0.7825081</y>
				<z>0.322582</z>
			</location>
		</pointmass>

		<pointmass name="passenger.25">
			<weight unit="LBS">134.6806</weight>
			<location name="ClassTourist.11" unit="M">
				<!-- 3AR -->
				<x>13.6796656</x>
				<y>0.3409482</y>
				<z>0.322582</z>
			</location>
		</pointmass>

		<pointmass name="passenger.26">
			<weight unit="LBS">150.04277</weight>
			<location name="ClassTourist.12" unit="M">
				<!-- 3AL -->
				<x>13.6716347</x>
				<y>-0.8873981</y>
				<z>0.322582</z>
			</location>
		</pointmass>

		<pointmass name="passenger.27">
			<weight unit="LBS">145.93409</weight>
			<location name="ClassTourist.13" unit="M">
				<!-- 3WL -->
				<x>13.6716347</x>
				<y>-1.2807891</y>
				<z>0.3225821</z>
			</location>
		</pointmass>

		<!-- row 7 -->
		<pointmass name="passenger.28">
			<weight unit="LBS">113.77789</weight>
			<location name="ClassTourist.14" unit="M">
				<!-- 3WR -->
				<x>14.5467339</x>
				<y>1.2401263</y>
				<z>0.3225821</z>
			</location>
		</pointmass>

		<pointmass name="passenger.29">
			<weight unit="LBS">118.17457</weight>
			<location name="ClassTourist.15" unit="M">
				<!-- 3MR -->
				<x>14.5467358</x>
				<y>0.7825081</y>
				<z>0.322582</z>
			</location>
		</pointmass>

		<pointmass name="passenger.30">
			<weight unit="LBS">124.88479</weight>
			<location name="ClassTourist.16" unit="M">
				<!-- 3AR -->
				<x>14.5467377</x>
				<y>0.3409482</y>
				<z>0.322582</z>
			</location>
		</pointmass>

		<pointmass name="passenger.31">
			<weight unit="LBS">151.09945</weight>
			<location name="ClassTourist.17" unit="M">
				<!-- 3AL -->
				<x>14.5387001</x>
				<y>-0.8873981</y>
				<z>0.322582</z>
			</location>
		</pointmass>

		<pointmass name="passenger.32">
			<weight unit="LBS">129.90332</weight>
			<location name="ClassTourist.18" unit="M">
				<!-- 3WL -->
				<x>14.5387001</x>
				<y>-1.2807891</y>
				<z>0.3225821</z>
			</location>
		</pointmass>

		<!-- row 8 -->
		<pointmass name="passenger.33">
			<weight unit="LBS">140.47939</weight>
			<location name="ClassTourist.19" unit="M">
				<!-- 3WR -->
				<x>15.4057636</x>
				<y>1.2401263</y>
				<z>0.322582</z>
			</location>
		</pointmass>

		<pointmass name="passenger.34">
			<weight unit="LBS">121.4433</weight>
			<location name="ClassTourist.20" unit="M">
				<!-- 3MR -->
				<x>15.4057655</x>
				<y>0.7825081</y>
				<z>0.322582</z>
			</location>
		</pointmass>

		<pointmass name="passenger.35">
			<weight unit="LBS">132.81288</weight>
			<location name="ClassTourist.21" unit="M">
				<!-- 3AR -->
				<x>15.4057636</x>
				<y>0.3409482</y>
				<z>0.322582</z>
			</location>
		</pointmass>

		<pointmass name="passenger.36">
			<weight unit="LBS">144.1954</weight>
			<location name="ClassTourist.22" unit="M">
				<!-- 3AL -->
				<x>15.3977432</x>
				<y>-0.8873981</y>
				<z>0.322582</z>
			</location>
		</pointmass>

		<pointmass name="passenger.37">
			<weight unit="LBS">142.80407</weight>
			<location name="ClassTourist.23" unit="M">
				<!-- 3WL -->
				<x>15.3977404</x>
				<y>-1.2807891</y>
				<z>0.322582</z>
			</location>
		</pointmass>

		<!-- row 9 -->
		<pointmass name="passenger.38">
			<weight unit="LBS">134.66391</weight>
			<location name="ClassTourist.24" unit="M">
				<!-- 3WR -->
				<x>16.2648125</x>
				<y>1.2401263</y>
				<z>0.322582</z>
			</location>
		</pointmass>

		<pointmass name="passenger.39">
			<weight unit="LBS">129.56529</weight>
			<location name="ClassTourist.25" unit="M">
				<!-- 3MR -->
				<x>16.2648067</x>
				<y>0.7825081</y>
				<z>0.322582</z>
			</location>
		</pointmass>

		<pointmass name="passenger.40">
			<weight unit="LBS">138.41333</weight>
			<location name="ClassTourist.26" unit="M">
				<!-- 3AR -->
				<x>16.2648125</x>
				<y>0.3409482</y>
				<z>0.322582</z>
			</location>
		</pointmass>

		<pointmass name="passenger.41">
			<weight unit="LBS">116.20223</weight>
			<location name="ClassTourist.27" unit="M">
				<!-- 3AL -->
				<x>16.2567787</x>
				<y>-0.8873981</y>
				<z>0.322582</z>
			</location>
		</pointmass>

		<pointmass name="passenger.42">
			<weight unit="LBS">144.57251</weight>
			<location name="ClassTourist.28" unit="M">
				<!-- 3WL -->
				<x>16.2567749</x>
				<y>-1.2807891</y>
				<z>0.322582</z>
			</location>
		</pointmass>

		<!-- row 10 -->
		<pointmass name="passenger.43">
			<weight unit="LBS">140.5418</weight>
			<location name="ClassTourist.29" unit="M">
				<!-- 3WR -->
				<x>17.1639919</x>
				<y>1.2401263</y>
				<z>0.322582</z>
			</location>
		</pointmass>

		<pointmass name="passenger.44">
			<weight unit="LBS">131.73589</weight>
			<location name="ClassTourist.30" unit="M">
				<!-- 3MR -->
				<x>17.1639748</x>
				<y>0.7825081</y>
				<z>0.322582</z>
			</location>
		</pointmass>

		<pointmass name="passenger.45">
			<weight unit="LBS">138.7183</weight>
			<location name="ClassTourist.31" unit="M">
				<!-- 3AR -->
				<x>17.1639748</x>
				<y>0.3409482</y>
				<z>0.322582</z>
			</location>
		</pointmass>

		<pointmass name="passenger.46">
			<weight unit="LBS">136.98623</weight>
			<location name="ClassTourist.32" unit="M">
				<!-- 3AL -->
				<x>17.1559372</x>
				<y>-0.8873981</y>
				<z>0.322582</z>
			</location>
		</pointmass>

		<pointmass name="passenger.47">
			<weight unit="LBS">127.34103</weight>
			<location name="ClassTourist.33" unit="M">
				<!-- 3WL -->
				<x>17.155941</x>
				<y>-1.2807891</y>
				<z>0.322582</z>
			</location>
		</pointmass>

		<!-- row 11 -->
		<pointmass name="passenger.48">
			<weight unit="LBS">110.11978</weight>
			<location name="ClassTourist.34" unit="M">
				<!-- 3WR -->
				<x>18.0631752</x>
				<y>1.2401263</y>
				<z>0.322582</z>
			</location>
		</pointmass>

		<pointmass name="passenger.49">
			<weight unit="LBS">124.89853</weight>
			<location name="ClassTourist.35" unit="M">
				<!-- 3MR -->
				<x>18.0631638</x>
				<y>0.7825081</y>
				<z>0.322582</z>
			</location>
		</pointmass>

		<pointmass name="passenger.50">
			<weight unit="LBS">114.62736</weight>
			<location name="ClassTourist.36" unit="M">
				<!-- 3AR -->
				<x>18.063158</x>
				<y>0.3409482</y>
				<z>0.322582</z>
			</location>
		</pointmass>

		<pointmass name="passenger.51">
			<weight unit="LBS">141.84422</weight>
			<location name="ClassTourist.37" unit="M">
				<!-- 3AL -->
				<x>18.0551262</x>
				<y>-0.8873981</y>
				<z>0.322582</z>
			</location>
		</pointmass>

		<pointmass name="passenger.52">
			<weight unit="LBS">121.04746</weight>
			<location name="ClassTourist.38" unit="M">
				<!-- 3WL -->
				<x>18.0551205</x>
				<y>-1.2807891</y>
				<z>0.322582</z>
			</location>
		</pointmass>

		<!-- row 12 -->
		<pointmass name="passenger.53">
			<weight unit="LBS">123.30449</weight>
			<location name="ClassTourist.39" unit="M">
				<!-- 3WR -->
				<x>19.0185452</x>
				<y>1.2401263</y>
				<z>0.3225821</z>
			</location>
		</pointmass>

		<pointmass name="passenger.54">
			<weight unit="LBS">122.47899</weight>
			<location name="ClassTourist.40" unit="M">
				<!-- 3MR -->
				<x>19.0185356</x>
				<y>0.7825081</y>
				<z>0.322582</z>
			</location>
		</pointmass>

		<pointmass name="passenger.55">
			<weight unit="LBS">137.22372</weight>
			<location name="ClassTourist.41" unit="M">
				<!-- 3AR -->
				<x>19.0185356</x>
				<y>0.3409482</y>
				<z>0.322582</z>
			</location>
		</pointmass>

		<pointmass name="passenger.56">
			<weight unit="LBS">125.94436</weight>
			<location name="ClassTourist.42" unit="M">
				<!-- 3AL -->
				<x>19.0105114</x>
				<y>-0.8873981</y>
				<z>0.322582</z>
			</location>
		</pointmass>

		<pointmass name="passenger.57">
			<weight unit="LBS">142.40145</weight>
			<location name="ClassTourist.43" unit="M">
				<!-- 3WL -->
				<x>19.0105076</x>
				<y>-1.2807891</y>
				<z>0.3225821</z>
			</location>
		</pointmass>

		<!-- row 13 -->
		<pointmass name="passenger.58">
			<weight unit="LBS">141.86993</weight>
			<location name="ClassTourist.44" unit="M">
				<!-- 3WR -->
				<x>19.9016685</x>
				<y>1.2401263</y>
				<z>0.322582</z>
			</location>
		</pointmass>

		<pointmass name="passenger.59">
			<weight unit="LBS">139.99359</weight>
			<location name="ClassTourist.45" unit="M">
				<!-- 3MR -->
				<x>19.9016418</x>
				<y>0.7825081</y>
				<z>0.322582</z>
			</location>
		</pointmass>

		<pointmass name="passenger.60">
			<weight unit="LBS">130.93973</weight>
			<location name="ClassTourist.46" unit="M">
				<!-- 3AR -->
				<x>19.9016438</x>
				<y>0.3409482</y>
				<z>0.322582</z>
			</location>
		</pointmass>

		<pointmass name="passenger.61">
			<weight unit="LBS">135.56209</weight>
			<location name="ClassTourist.47" unit="M">
				<!-- 3AL -->
				<x>19.8936157</x>
				<y>-0.8873981</y>
				<z>0.322582</z>
			</location>
		</pointmass>

		<pointmass name="passenger.62">
			<weight unit="LBS">145.42397</weight>
			<location name="ClassTourist.48" unit="M">
				<!-- 3WL -->
				<x>19.8936119</x>
				<y>-1.2807891</y>
				<z>0.322582</z>
			</location>
		</pointmass>

		<!-- row 14 -->
		<pointmass name="passenger.63">
			<weight unit="LBS">208.5535</weight>
			<location name="ClassTourist.49" unit="M">
				<!-- 3WR -->
				<x>20.8008537</x>
				<y>1.2401263</y>
				<z>0.322582</z>
			</location>
		</pointmass>

		<pointmass name="passenger.64">
			<weight unit="LBS">143.72353</weight>
			<location name="ClassTourist.50" unit="M">
				<!-- 3MR -->
				<x>20.8008385</x>
				<y>0.7825081</y>
				<z>0.3225819</z>
			</location>
		</pointmass>

		<pointmass name="passenger.65">
			<weight unit="LBS">121.71637</weight>
			<location name="ClassTourist.51" unit="M">
				<!-- 3AR -->
				<x>20.8008404</x>
				<y>0.3409482</y>
				<z>0.322582</z>
			</location>
		</pointmass>

		<pointmass name="passenger.66">
			<weight unit="LBS">120.37926</weight>
			<location name="ClassTourist.52" unit="M">
				<!-- 3AL -->
				<x>20.7928047</x>
				<y>-0.8873981</y>
				<z>0.322582</z>
			</location>
		</pointmass>

		<pointmass name="passenger.67">
			<weight unit="LBS">126.72832</weight>
			<location name="ClassTourist.53" unit="M">
				<!-- 3WL -->
				<x>20.7928047</x>
				<y>-1.2807891</y>
				<z>0.322582</z>
			</location>
		</pointmass>

		<!-- row 15 -->
		<pointmass name="passenger.68">
			<weight unit="LBS">138.65072</weight>
			<location name="ClassTourist.54" unit="M">
				<!-- 3WR -->
				<x>21.5796089</x>
				<y>1.2401263</y>
				<z>0.322582</z>
			</location>
		</pointmass>

		<pointmass name="passenger.69">
			<weight unit="LBS">155.77062</weight>
			<location name="ClassTourist.55" unit="M">
				<!-- 3MR -->
				<x>21.5795898</x>
				<y>0.7825081</y>
				<z>0.3225819</z>
			</location>
		</pointmass>

		<pointmass name="passenger.70">
			<weight unit="LBS">134.47718</weight>
			<location name="ClassTourist.56" unit="M">
				<!-- 3AR -->
				<x>21.5795898</x>
				<y>0.3409482</y>
				<z>0.3225819</z>
			</location>
		</pointmass>

		<pointmass name="passenger.71">
			<weight unit="LBS">123.00018</weight>
			<location name="ClassTourist.57" unit="M">
				<!-- 3AL -->
				<x>21.5715561</x>
				<y>-0.8873981</y>
				<z>0.3225819</z>
			</location>
		</pointmass>

		<pointmass name="passenger.72">
			<weight unit="LBS">113.6687</weight>
			<location name="ClassTourist.58" unit="M">
				<!-- 3WL -->
				<x>21.5715504</x>
				<y>-1.2807891</y>
				<z>0.322582</z>
			</location>
		</pointmass>

		<!-- row 16 -->
		<pointmass name="passenger.73">
			<weight unit="LBS">128.88429</weight>
			<location name="ClassTourist.59" unit="M">
				<!-- 3AL -->
				<x>22.5349693</x>
				<y>-0.8873981</y>
				<z>0.322582</z>
			</location>
		</pointmass>

		<pointmass name="passenger.74">
			<weight unit="LBS">108.84105</weight>
			<location name="ClassTourist.60" unit="M">
				<!-- 3WL -->
				<x>22.5349693</x>
				<y>-1.2727585</y>
				<z>0.322582</z>
			</location>
		</pointmass>

		<!-- row 17 -->
		<pointmass name="passenger.75">
			<weight unit="LBS">132.87543</weight>
			<location name="ClassTourist.61" unit="M">
				<!-- 3AL -->
				<x>23.4502068</x>
				<y>-0.8873981</y>
				<z>0.322582</z>
			</location>
		</pointmass>

		<pointmass name="passenger.76">
			<weight unit="LBS">132.15214</weight>
			<location name="ClassTourist.62" unit="M">
				<!-- 3WL -->
				<x>23.4501896</x>
				<y>-1.2807891</y>
				<z>0.3225821</z>
			</location>
		</pointmass>

		<!-- Cargo compartments -->
		<pointmass name="Cargo.port.beam">
			<weight unit="LBS">119.84</weight>
			<location name="Cargo.port.beam" unit="M">
				<x>17.3798313</x>
				<y>-0.8778431</y>
				<z>-0.2929335</z>
			</location>
		</pointmass>

		<pointmass name="Cargo.port.bow">
			<weight unit="LBS">140.2</weight>
			<location name="Cargo.port.bow" unit="M">
				<x>9.0059357</x>
				<y>-0.8778438</y>
				<z>-0.2929335</z>
			</location>
		</pointmass>

		<pointmass name="Cargo.port.quarter">
			<weight unit="LBS">267.4</weight>
			<location name="Cargo.port.quarter" unit="M">
				<x>23.7526131</x>
				<y>-0.8778433</y>
				<z>-0.2929335</z>
			</location>
		</pointmass>

		<pointmass name="Cargo.starboard.beam">
			<weight unit="LBS">103.32</weight>
			<location name="Cargo.starboard.beam" unit="M">
				<x>17.3798294</x>
				<y>0.8798073</y>
				<z>-0.2929335</z>
			</location>
		</pointmass>

		<pointmass name="Cargo.starboard.bow">
			<weight unit="LBS">231.2</weight>
			<location name="Cargo.starboard.bow" unit="M">
				<x>9.0059357</x>
				<y>0.8798073</y>
				<z>-0.2929335</z>
			</location>
		</pointmass>

		<pointmass name="Cargo.starboard.quarter">
			<weight unit="LBS">209.16</weight>
			<location name="Cargo.starboard.quarter" unit="M">
				<x>23.7526131</x>
				<y>0.8798073</y>
				<z>-0.2929335</z>
			</location>
		</pointmass>
	</mass_balance>

	<ground_reactions>
		<contact type="BOGEY" name="NOSE_RIGHT">
			<location unit="M">
				<x>5.82243</x>
				<y>-0.20856</y>
				<z>-2.32668</z>
			</location>
			<static_friction>0.7292402</static_friction>
			<dynamic_friction>0.4915179</dynamic_friction>
			<rolling_friction>0.07375046</rolling_friction>
			<spring_coeff  unit="LBS/FT">132356.4</spring_coeff>
			<damping_coeff unit="LBS/FT/SEC">38130.61</damping_coeff>
			<max_steer unit="DEG">25.00</max_steer>
			<brake_group>NONE</brake_group>
			<retractable>1</retractable>
		</contact>

		<contact type="BOGEY" name="NOSE_LEFT">
		  <location unit="M">
		    <x>5.82243</x>
		    <y>0.20856</y>
		    <z>-2.32668</z>
		  </location>
			<static_friction>0.7098506</static_friction>
			<dynamic_friction>0.5564869</dynamic_friction>
			<rolling_friction>0.07708218</rolling_friction>
			<spring_coeff  unit="LBS/FT">132356.4</spring_coeff>
			<damping_coeff unit="LBS/FT/SEC">38130.61</damping_coeff>
			<max_steer unit="DEG">25.00</max_steer>
			<brake_group>NONE</brake_group>
			<retractable>1</retractable>
		</contact>

		<contact type="BOGEY" name="MAIN_LEFT.FRONT.1">
			<location unit="M">
				<x>18.07187</x>
				<y>-3.06778</y>
				<z>-2.51650</z>
			</location>
			<static_friction>0.8225295</static_friction>
			<dynamic_friction>0.5765024</dynamic_friction>
			<rolling_friction>0.07401899</rolling_friction>
			<spring_coeff  unit="LBS/FT">101812.6</spring_coeff>
			<damping_coeff unit="LBS/FT/SEC">32940.93</damping_coeff>
			<max_steer unit="DEG">0.00</max_steer>
			<brake_group>LEFT</brake_group>
			<retractable>1</retractable>
		</contact>

		<contact type="BOGEY" name="MAIN_LEFT.FRONT.2">
			<location unit="M">
				<x>18.07187</x>
				<y>-2.70422</y>
				<z>-2.51650</z>
			</location>
			<static_friction>0.8262161</static_friction>
			<dynamic_friction>0.5274378</dynamic_friction>
			<rolling_friction>0.07330274</rolling_friction>
			<spring_coeff  unit="LBS/FT">101812.6</spring_coeff>
			<damping_coeff unit="LBS/FT/SEC">32940.93</damping_coeff>
			<max_steer unit="DEG">0.00</max_steer>
			<brake_group>LEFT</brake_group>
			<retractable>1</retractable>
		</contact>

		<contact type="BOGEY" name="MAIN_LEFT.REAR.1">
			<location unit="M">
				<x>19.17659</x>
				<y>-3.06778</y>
				<z>-2.51755</z>
			</location>
			<static_friction>0.8047358</static_friction>
			<dynamic_friction>0.4550411</dynamic_friction>
			<rolling_friction>0.07368409</rolling_friction>
			<spring_coeff  unit="LBS/FT">101812.6</spring_coeff>
			<damping_coeff unit="LBS/FT/SEC">32940.93</damping_coeff>
			<max_steer unit="DEG">0.00</max_steer>
			<brake_group>LEFT</brake_group>
			<retractable>1</retractable>
		</contact>

		<contact type="BOGEY" name="MAIN_LEFT.REAR.2">
			<location unit="M">
				<x>19.17659</x>
				<y>-2.70422</y>
				<z>-2.51755</z>
			</location>
			<static_friction>0.7894144</static_friction>
			<dynamic_friction>0.5008035</dynamic_friction>
			<rolling_friction>0.07473419</rolling_friction>
			<spring_coeff  unit="LBS/FT">101812.6</spring_coeff>
			<damping_coeff unit="LBS/FT/SEC">32940.93</damping_coeff>
			<max_steer unit="DEG">0.00</max_steer>
			<brake_group>LEFT</brake_group>
			<retractable>1</retractable>
		</contact>

		<contact type="BOGEY" name="MAIN_RIGHT.FRONT.1">
			<location unit="M">
				<x>18.07187</x>
				<y>2.70422</y>
				<z>-2.51650</z>
			</location>
			<static_friction>0.7560863</static_friction>
			<dynamic_friction>0.4766751</dynamic_friction>
			<rolling_friction>0.07600020</rolling_friction>
			<spring_coeff  unit="LBS/FT">101812.6</spring_coeff>
			<damping_coeff unit="LBS/FT/SEC">32940.93</damping_coeff>
			<max_steer unit="DEG">0.00</max_steer>
			<brake_group>RIGHT</brake_group>
			<retractable>1</retractable>
		</contact>

		<contact type="BOGEY" name="MAIN_RIGHT.FRONT.2">
			<location unit="M">
				<x>18.07187</x>
				<y>3.06778</y>
				<z>-2.51650</z>
			</location>
			<static_friction>0.7584304</static_friction>
			<dynamic_friction>0.4634785</dynamic_friction>
			<rolling_friction>0.07780839</rolling_friction>
			<spring_coeff  unit="LBS/FT">101812.6</spring_coeff>
			<damping_coeff unit="LBS/FT/SEC">32940.93</damping_coeff>
			<max_steer unit="DEG">0.00</max_steer>
			<brake_group>RIGHT</brake_group>
			<retractable>1</retractable>
		</contact>

		<contact type="BOGEY" name="MAIN_RIGHT.REAR.1">
			<location unit="M">
				<x>19.17659</x>
				<y>2.70422</y>
				<z>-2.51755</z>
			</location>
			<static_friction>0.8888532</static_friction>
			<dynamic_friction>0.4940983</dynamic_friction>
			<rolling_friction>0.07274515</rolling_friction>
			<spring_coeff  unit="LBS/FT">101812.6</spring_coeff>
			<damping_coeff unit="LBS/FT/SEC">32940.93</damping_coeff>
			<max_steer unit="DEG">0.00</max_steer>
			<brake_group>RIGHT</brake_group>
			<retractable>1</retractable>
		</contact>

		<contact type="BOGEY" name="MAIN_RIGHT.REAR.2">
			<location unit="M">
				<x>19.17659</x>
				<y>3.06778</y>
				<z>-2.51755</z>
			</location>
			<static_friction>0.8657917</static_friction>
			<dynamic_friction>0.4126235</dynamic_friction>
			<rolling_friction>0.07371412</rolling_friction>
			<spring_coeff  unit="LBS/FT">101812.6</spring_coeff>
			<damping_coeff unit="LBS/FT/SEC">32940.93</damping_coeff>
			<max_steer unit="DEG">0.00</max_steer>
			<brake_group>RIGHT</brake_group>
			<retractable>1</retractable>
		</contact>

                <!-- Contacts structure for collision with ground effects -->
                <!-- disabled contacts structure
		<contact type="STRUCTURE" name="Fuselage.Bottom.000">
			<location unit="M">
				<x>24.1900616</x>
				<y>0</y>
				<z>-1.314667</z>
			</location>
			<static_friction>1</static_friction>
			<dynamic_friction>1</dynamic_friction>
			<spring_coeff unit="LBS/FT">4500.14</spring_coeff>
			<damping_coeff unit="LBS/FT/SEC">1950</damping_coeff>
		</contact>

		<contact type="STRUCTURE" name="Fuselage.Bottom.001">
			<location unit="M">
				<x>0.6354561</x>
				<y>0</y>
				<z>-0.490905</z>
			</location>
			<static_friction>1</static_friction>
			<dynamic_friction>1</dynamic_friction>
			<spring_coeff unit="LBS/FT">4500.14</spring_coeff>
			<damping_coeff unit="LBS/FT/SEC">1950</damping_coeff>
		</contact>

		<contact type="STRUCTURE" name="Fuselage.Bottom.002">
			<location unit="M">
				<x>1.6814346</x>
				<y>0</y>
				<z>-0.8338531</z>
			</location>
			<static_friction>1</static_friction>
			<dynamic_friction>1</dynamic_friction>
			<spring_coeff unit="LBS/FT">4500.14</spring_coeff>
			<damping_coeff unit="LBS/FT/SEC">1950</damping_coeff>
		</contact>

		<contact type="STRUCTURE" name="Fuselage.Bottom.003">
			<location unit="M">
				<x>3.1407013</x>
				<y>0</y>
				<z>-1.0602043</z>
			</location>
			<static_friction>1</static_friction>
			<dynamic_friction>1</dynamic_friction>
			<spring_coeff unit="LBS/FT">4500.14</spring_coeff>
			<damping_coeff unit="LBS/FT/SEC">1950</damping_coeff>
		</contact>

		<contact type="STRUCTURE" name="Fuselage.Bottom.004">
			<location unit="M">
				<x>5.2664299</x>
				<y>0</y>
				<z>-1.212882</z>
			</location>
			<static_friction>1</static_friction>
			<dynamic_friction>1</dynamic_friction>
			<spring_coeff unit="LBS/FT">4500.14</spring_coeff>
			<damping_coeff unit="LBS/FT/SEC">1950</damping_coeff>
		</contact>

		<contact type="STRUCTURE" name="Fuselage.Bottom.005">
			<location unit="M">
				<x>35.6104164</x>
				<y>0</y>
				<z>1.1516268</z>
			</location>
			<static_friction>1</static_friction>
			<dynamic_friction>1</dynamic_friction>
			<spring_coeff unit="LBS/FT">4500.14</spring_coeff>
			<damping_coeff unit="LBS/FT/SEC">1950</damping_coeff>
		</contact>

		<contact type="STRUCTURE" name="Fuselage.Bottom.006">
			<location unit="M">
				<x>32.4402199</x>
				<y>0</y>
				<z>-0.0347366</z>
			</location>
			<static_friction>1</static_friction>
			<dynamic_friction>1</dynamic_friction>
			<spring_coeff unit="LBS/FT">4500.14</spring_coeff>
			<damping_coeff unit="LBS/FT/SEC">1950</damping_coeff>
		</contact>

		<contact type="STRUCTURE" name="Fuselage.Bottom.007">
			<location unit="M">
				<x>28.3588905</x>
				<y>0</y>
				<z>-0.8026935</z>
			</location>
			<static_friction>1</static_friction>
			<dynamic_friction>1</dynamic_friction>
			<spring_coeff unit="LBS/FT">4500.14</spring_coeff>
			<damping_coeff unit="LBS/FT/SEC">1950</damping_coeff>
		</contact>

		<contact type="STRUCTURE" name="Fuselage.Bottom.008">
			<location unit="M">
				<x>9.6870441</x>
				<y>0</y>
				<z>-1.8052838</z>
			</location>
			<static_friction>1</static_friction>
			<dynamic_friction>1</dynamic_friction>
			<spring_coeff unit="LBS/FT">4500.14</spring_coeff>
			<damping_coeff unit="LBS/FT/SEC">1950</damping_coeff>
		</contact>

		<contact type="STRUCTURE" name="Fuselage.Bottom.009">
			<location unit="M">
				<x>9.921875</x>
				<y>0</y>
				<z>-1.3146648</z>
			</location>
			<static_friction>1</static_friction>
			<dynamic_friction>1</dynamic_friction>
			<spring_coeff unit="LBS/FT">4500.14</spring_coeff>
			<damping_coeff unit="LBS/FT/SEC">1950</damping_coeff>
		</contact>

		<contact type="STRUCTURE" name="Fuselage.Bottom.010">
			<location unit="M">
				<x>19.730423</x>
				<y>0</y>
				<z>-1.314667</z>
			</location>
			<static_friction>1</static_friction>
			<dynamic_friction>1</dynamic_friction>
			<spring_coeff unit="LBS/FT">4500.14</spring_coeff>
			<damping_coeff unit="LBS/FT/SEC">1950</damping_coeff>
		</contact>

		<contact type="STRUCTURE" name="Fuselage.Bottom.011">
			<location unit="M">
				<x>14.9830475</x>
				<y>0</y>
				<z>-1.314667</z>
			</location>
			<static_friction>1</static_friction>
			<dynamic_friction>1</dynamic_friction>
			<spring_coeff unit="LBS/FT">4500.14</spring_coeff>
			<damping_coeff unit="LBS/FT/SEC">1950</damping_coeff>
		</contact>

		<contact type="STRUCTURE" name="Fuselage.Bottom.012">
			<location unit="M">
				<x>7.4005756</x>
				<y>0</y>
				<z>-1.3146648</z>
			</location>
			<static_friction>1</static_friction>
			<dynamic_friction>1</dynamic_friction>
			<spring_coeff unit="LBS/FT">4500.14</spring_coeff>
			<damping_coeff unit="LBS/FT/SEC">1950</damping_coeff>
		</contact>

		<contact type="STRUCTURE" name="Fuselage.Nose.000">
			<location unit="M">
				<x>0</x>
				<y>0</y>
				<z>0</z>
			</location>
			<static_friction>1</static_friction>
			<dynamic_friction>1</dynamic_friction>
			<spring_coeff unit="LBS/FT">4500.14</spring_coeff>
			<damping_coeff unit="LBS/FT/SEC">1950</damping_coeff>
		</contact>

		<contact type="STRUCTURE" name="Fuselage.Nose.001">
			<location unit="M">
				<x>0.151098</x>
				<y>0.2383901</y>
				<z>0.0110913</z>
			</location>
			<static_friction>1</static_friction>
			<dynamic_friction>1</dynamic_friction>
			<spring_coeff unit="LBS/FT">4500.14</spring_coeff>
			<damping_coeff unit="LBS/FT/SEC">1950</damping_coeff>
		</contact>

		<contact type="STRUCTURE" name="Fuselage.Nose.002">
			<location unit="M">
				<x>0.151098</x>
				<y>-0.2383925</y>
				<z>0.0110913</z>
			</location>
			<static_friction>1</static_friction>
			<dynamic_friction>1</dynamic_friction>
			<spring_coeff unit="LBS/FT">4500.14</spring_coeff>
			<damping_coeff unit="LBS/FT/SEC">1950</damping_coeff>
		</contact>

		<contact type="STRUCTURE" name="Fuselage.Top.000">
			<location unit="M">
				<x>3.2054827</x>
				<y>0</y>
				<z>1.8060127</z>
			</location>
			<static_friction>1</static_friction>
			<dynamic_friction>1</dynamic_friction>
			<spring_coeff unit="LBS/FT">4500.14</spring_coeff>
			<damping_coeff unit="LBS/FT/SEC">1950</damping_coeff>
		</contact>

		<contact type="STRUCTURE" name="Fuselage.Top.001">
			<location unit="M">
				<x>1.3260863</x>
				<y>0</y>
				<z>1.1225957</z>
			</location>
			<static_friction>1</static_friction>
			<dynamic_friction>1</dynamic_friction>
			<spring_coeff unit="LBS/FT">4500.14</spring_coeff>
			<damping_coeff unit="LBS/FT/SEC">1950</damping_coeff>
		</contact>

		<contact type="STRUCTURE" name="Fuselage.Top.002">
			<location unit="M">
				<x>2.3023961</x>
				<y>0</y>
				<z>1.5619351</z>
			</location>
			<static_friction>1</static_friction>
			<dynamic_friction>1</dynamic_friction>
			<spring_coeff unit="LBS/FT">4500.14</spring_coeff>
			<damping_coeff unit="LBS/FT/SEC">1950</damping_coeff>
		</contact>

		<contact type="STRUCTURE" name="HStab.Left.000">
			<location unit="M">
				<x>36.331028</x>
				<y>-5.1750836</y>
				<z>3.1364384</z>
			</location>
			<static_friction>1</static_friction>
			<dynamic_friction>1</dynamic_friction>
			<spring_coeff unit="LBS/FT">4500.14</spring_coeff>
			<damping_coeff unit="LBS/FT/SEC">1950</damping_coeff>
		</contact>

		<contact type="STRUCTURE" name="HStab.Left.001">
			<location unit="M">
				<x>34.2542038</x>
				<y>-5.1750841</y>
				<z>3.1707077</z>
			</location>
			<static_friction>1</static_friction>
			<dynamic_friction>1</dynamic_friction>
			<spring_coeff unit="LBS/FT">4500.14</spring_coeff>
			<damping_coeff unit="LBS/FT/SEC">1950</damping_coeff>
		</contact>

		<contact type="STRUCTURE" name="HStab.Right.000">
			<location unit="M">
				<x>36.331028</x>
				<y>5.1211329</y>
				<z>3.1364384</z>
			</location>
			<static_friction>1</static_friction>
			<dynamic_friction>1</dynamic_friction>
			<spring_coeff unit="LBS/FT">4500.14</spring_coeff>
			<damping_coeff unit="LBS/FT/SEC">1950</damping_coeff>
		</contact>

		<contact type="STRUCTURE" name="HStab.Right.001">
			<location unit="M">
				<x>34.2542</x>
				<y>5.1750798</y>
				<z>3.1707077</z>
			</location>
			<static_friction>1</static_friction>
			<dynamic_friction>1</dynamic_friction>
			<spring_coeff unit="LBS/FT">4500.14</spring_coeff>
			<damping_coeff unit="LBS/FT/SEC">1950</damping_coeff>
		</contact>

		<contact type="STRUCTURE" name="VStab.000">
			<location unit="M">
				<x>34.1907463</x>
				<y>0</y>
				<z>6.5187583</z>
			</location>
			<static_friction>1</static_friction>
			<dynamic_friction>1</dynamic_friction>
			<spring_coeff unit="LBS/FT">4500.14</spring_coeff>
			<damping_coeff unit="LBS/FT/SEC">1950</damping_coeff>
		</contact>

		<contact type="STRUCTURE" name="VStab.001">
			<location unit="M">
				<x>34.9732552</x>
				<y>0</y>
				<z>6.2251616</z>
			</location>
			<static_friction>1</static_friction>
			<dynamic_friction>1</dynamic_friction>
			<spring_coeff unit="LBS/FT">4500.14</spring_coeff>
			<damping_coeff unit="LBS/FT/SEC">1950</damping_coeff>
		</contact>

		<contact type="STRUCTURE" name="VStab.002">
			<location unit="M">
				<x>33.5946121</x>
				<y>0</y>
				<z>6.4767728</z>
			</location>
			<static_friction>1</static_friction>
			<dynamic_friction>1</dynamic_friction>
			<spring_coeff unit="LBS/FT">4500.14</spring_coeff>
			<damping_coeff unit="LBS/FT/SEC">1950</damping_coeff>
		</contact>

		<contact type="STRUCTURE" name="Wing.Left.000">
			<location unit="M">
				<x>22.2116165</x>
				<y>-17.1537724</y>
				<z>-0.035098</z>
			</location>
			<static_friction>1</static_friction>
			<dynamic_friction>1</dynamic_friction>
			<spring_coeff unit="LBS/FT">4500.14</spring_coeff>
			<damping_coeff unit="LBS/FT/SEC">1950</damping_coeff>
		</contact>

		<contact type="STRUCTURE" name="Wing.Left.001">
			<location unit="M">
				<x>24.4579124</x>
				<y>-17.1094933</y>
				<z>-0.0398751</z>
			</location>
			<static_friction>1</static_friction>
			<dynamic_friction>1</dynamic_friction>
			<spring_coeff unit="LBS/FT">4500.14</spring_coeff>
			<damping_coeff unit="LBS/FT/SEC">1950</damping_coeff>
		</contact>

		<contact type="STRUCTURE" name="Wing.Left.002">
			<location unit="M">
				<x>21.414402</x>
				<y>-17.1094933</y>
				<z>-0.0608648</z>
			</location>
			<static_friction>1</static_friction>
			<dynamic_friction>1</dynamic_friction>
			<spring_coeff unit="LBS/FT">4500.14</spring_coeff>
			<damping_coeff unit="LBS/FT/SEC">1950</damping_coeff>
		</contact>

		<contact type="STRUCTURE" name="Wing.Right.000">
			<location unit="M">
				<x>22.2116165</x>
				<y>17.1511497</y>
				<z>-0.035098</z>
			</location>
			<static_friction>1</static_friction>
			<dynamic_friction>1</dynamic_friction>
			<spring_coeff unit="LBS/FT">4500.14</spring_coeff>
			<damping_coeff unit="LBS/FT/SEC">1950</damping_coeff>
		</contact>

		<contact type="STRUCTURE" name="Wing.Right.001">
			<location unit="M">
				<x>24.4579124</x>
				<y>17.1094875</y>
				<z>-0.0398751</z>
			</location>
			<static_friction>1</static_friction>
			<dynamic_friction>1</dynamic_friction>
			<spring_coeff unit="LBS/FT">4500.14</spring_coeff>
			<damping_coeff unit="LBS/FT/SEC">1950</damping_coeff>
		</contact>

		<contact type="STRUCTURE" name="Wing.Right.002">
			<location unit="M">
				<x>21.4144039</x>
				<y>17.1094894</y>
				<z>-0.0608648</z>
			</location>
			<static_friction>1</static_friction>
			<dynamic_friction>1</dynamic_friction>
			<spring_coeff unit="LBS/FT">4500.14</spring_coeff>
			<damping_coeff unit="LBS/FT/SEC">1950</damping_coeff>
		</contact>
		-->
	</ground_reactions>

	<propulsion>
		<engine file="Avon">
			<location unit="M">
				<x>24.93972</x>
				<y>2.71645</y>
				<z>0.76367</z>
			</location>
			<orient unit="DEG">
				<pitch>2.22</pitch>
				<roll>0.00</roll>
				<yaw>-1.80</yaw>
			</orient>
			<feed>2</feed>
			<thruster file="direct">
				<sense>1</sense>
				<location unit="M">
				  <x>24.64803</x>
				  <y>2.65200</y>
				  <z>0.75898</z>
				</location>
				<orient unit="DEG">
					<pitch>2.22</pitch>
					<roll>0.00</roll>
					<yaw>-1.80</yaw>
				</orient>
			</thruster>
		</engine>

		<engine file="Avon">
		  <location unit="M">
		                <x>24.93972</x>
				<y>-2.71645</y>
				<z>0.76367</z>
		  </location>
		  <orient unit="DEG">
		    <pitch>2.22</pitch>
		    <roll>0.00</roll>
		    <yaw>-1.80</yaw>
		  </orient>
		  <feed>2</feed>
		  <thruster file="direct">
		    <sense>1</sense>
		    <location unit="M">
		      <x>24.64803</x>
		      <y>-2.65200</y>
		      <z>0.75898</z>
		    </location>
		    <orient unit="DEG">
		      <pitch>2.22</pitch>
		      <roll>0.00</roll>
		      <yaw>-1.80</yaw>
		    </orient>
		  </thruster>
		</engine>

		<tank type="FUEL" number="0">
			<location unit="M">
				<x>18.18818</x>
				<y>-5.47192</y>
				<z>-0.52150</z>
			</location>
			<capacity unit="LBS">18770</capacity>
			<contents unit="LBS">9000</contents>
		</tank>

		<tank type="FUEL" number="1">
			<location unit="M">
				<x>18.18818</x>
				<y>5.47192</y>
				<z>-0.52150</z>
			</location>
			<capacity unit="LBS">18770</capacity>
			<contents unit="LBS">9000</contents>
		</tank>

		<tank type="FUEL" number="2">
			<location unit="M">
				<x>15.84130</x>
				<y>0.0000</y>
				<z>-0.80897</z>
			</location>
			<capacity unit="LBS">130</capacity>
			<contents unit="LBS">115</contents>
		</tank>
	</propulsion>

	<!-- system file="Propulsion.xml"/ -->
	<system file="Fuel.xml"/>
	<!-- system file="AircraftControl.xml"/ -->
	<!-- system file="LandingGear.xml"/ -->
	<!-- system file="Flaps.xml"/ -->
	<!-- system file="Spoilers.xml"/ -->

	<flight_control name="FCS: SudAviation-Caravelle">
	  <channel name="PITCH">
	    <summer name="Pitch Trim Sum">
	      <input>fcs/elevator-cmd-norm</input>
	      <input>fcs/pitch-trim-cmd-norm</input>
	      <clipto>
		<min>-1</min>
		<max>1</max>
	      </clipto>
	    </summer>

	    <aerosurface_scale name="Elevator Control">
	      <input>fcs/pitch-trim-sum</input>
	      <range>
		<min>-0.35</min>
		<max>0.35</max>
	      </range>
	      <output>fcs/elevator-pos-rad</output>
	    </aerosurface_scale>

	    <aerosurface_scale name="elevator normalization">
	      <input>fcs/elevator-pos-rad</input>
	      <range>
		<min>-1</min>
		<max>1</max>
	      </range>
	      <output>fcs/elevator-pos-norm</output>
	    </aerosurface_scale>
	  </channel>

	  <channel name="ROLL">
	    <summer name="Roll Trim Sum">
	      <input>fcs/aileron-cmd-norm</input>
	      <input>fcs/roll-trim-cmd-norm</input>
	      <clipto>
		<min>-1</min>
		<max>1</max>
	      </clipto>
	    </summer>

	    <aerosurface_scale name="Left Aileron Control">
	      <input>fcs/roll-trim-sum</input>
	      <range>
		<min>-0.25</min>
		<max>0.25</max>
	      </range>
	      <output>fcs/left-aileron-pos-rad</output>
	    </aerosurface_scale>

	    <aerosurface_scale name="Right Aileron Control">
	      <input>fcs/roll-trim-sum</input>
	      <range>
		<min>-0.25</min>
		<max>0.25</max>
	      </range>
	      <output>fcs/right-aileron-pos-rad</output>
	    </aerosurface_scale>

	    <aerosurface_scale name="left aileron normalization">
	      <input>fcs/left-aileron-pos-rad</input>
	      <domain>
		<min>-0.25</min>
		<max>0.25</max>
	      </domain>
	      <range>
		<min>-1</min>
		<max>1</max>
	      </range>
	      <output>fcs/left-aileron-pos-norm</output>
	    </aerosurface_scale>

	    <aerosurface_scale name="right aileron normalization">
	      <input>fcs/right-aileron-pos-rad</input>
	      <domain>
		<min>-0.25</min>
		<max>0.25</max>
	      </domain>
	      <range>
		<min>-1</min>
		<max>1</max>
	      </range>
	      <output>fcs/right-aileron-pos-norm</output>
	    </aerosurface_scale>
	  </channel>

	  <channel name="YAW">
	    <summer name="Rudder Command Sum">
	      <input>fcs/rudder-cmd-norm</input>
	      <input>fcs/yaw-trim-cmd-norm</input>
	      <clipto>
		<min>-0.35</min>
		<max>0.35</max>
	      </clipto>
	    </summer>

	    <scheduled_gain name="Yaw Damper Rate">
	      <input>velocities/r-aero-rad_sec</input>
	      <table>
		<independentVar>aero/qbar-psf</independentVar>
		<tableData>
		  3.0000   0.0000
		  11.0000   2.0000
		</tableData>
	      </table>
	    </scheduled_gain>

	    <scheduled_gain name="Yaw Damper Beta">
	      <input>aero/beta-rad</input>
	      <table>
		<independentVar>aero/qbar-psf</independentVar>
		<tableData>
		  3.0000   0.0000
		  11.0000   0.0000
		</tableData>
	      </table>
	    </scheduled_gain>

	    <summer name="Yaw Damper Sum">
	      <input>fcs/yaw-damper-beta</input>
	      <input>fcs/yaw-damper-rate</input>
	      <clipto>
		<min>-0.2000</min>
		<max>0.2000</max>
	      </clipto>
	    </summer>

	    <scheduled_gain name="Yaw Damper Final">
	      <input>fcs/yaw-damper-sum</input>
	      <table>
		<independentVar>aero/qbar-psf</independentVar>
		<tableData>
		  2.9900   0.0000
		  3.0000   1.0000
		</tableData>
	      </table>
	    </scheduled_gain>

	    <summer name="Rudder Sum">
	      <input>fcs/rudder-command-sum</input>
	      <input>fcs/yaw-damper-final</input>
	      <clipto>
		<min>-1</min>
		<max>1</max>
	      </clipto>
	    </summer>

	    <aerosurface_scale name="Rudder Control">
	      <input>fcs/rudder-sum</input>
	      <range>
		<min>-0.35</min>
		<max>0.35</max>
	      </range>
	      <output>fcs/rudder-pos-rad</output>
	    </aerosurface_scale>

	    <aerosurface_scale name="rudder normalization">
	      <input>fcs/rudder-pos-rad</input>
	      <domain>
		<min>-0.35</min>
		<max>0.35</max>
	      </domain>
	      <range>
		<min>-1</min>
		<max>1</max>
	      </range>
	      <output>fcs/rudder-pos-norm</output>
	    </aerosurface_scale>
	  </channel>

	  <channel name="FLAPS">
	    <kinematic name="Flaps Control">
	      <input>fcs/flap-cmd-norm</input>
	      <traverse>
		<setting>
		  <position>0.0</position>
		  <time>0.0000</time>
		</setting>
		<setting>
		  <position>18.000</position>
		  <time>5.0000</time>
		</setting>
		<setting>
		  <position>36.0000</position>
		  <time>10.0000</time>
		</setting>
	      </traverse>
	      <output>fcs/flap-pos-deg</output>
	    </kinematic>

	    <aerosurface_scale name="flap normalization">
	      <input>fcs/flap-pos-deg</input>
	      <domain>
		<min>0</min>
		<max>36</max>
	      </domain>
	      <range>
		<min>0</min>
		<max>1</max>
	      </range>
	      <output>fcs/flap-pos-norm</output>
	    </aerosurface_scale>
	  </channel>

	  <channel name="GEAR">
	    <switch name="fcs/gear-no-wow">
	      <default value="1"/>
	      <test logic="AND" value="0">
		gear/unit[1]/WOW eq 1
		gear/unit[2]/WOW eq 1
	      </test>
	    </switch>

	    <kinematic name="Gear Control">
	      <input>gear/gear-cmd-norm</input>
	      <traverse>
		<setting>
		  <position>0</position>
		  <time>0</time>
		</setting>
		<setting>
		  <position>1</position>
		  <time>15</time>
		</setting>
	      </traverse>
	      <output>gear/gear-pos-norm</output>
	    </kinematic>
	  </channel>

	  <channel name="SPOILERS">
	    <kinematic name="Spoilers Control">
	      <input>fcs/spoiler-cmd-norm</input>
	      <traverse>
		<setting>
		  <position>0</position>
		  <time>0 </time>
		</setting>
		<setting>
		  <position>1</position>
		  <time>1</time>
		</setting>
	      </traverse>
	      <output>fcs/spoilers-pos-norm</output>
	    </kinematic>
	  </channel>
	</flight_control>

	<aerodynamics>
	  <!-- Lift due to ground effects to make the take off faster
		<function name="aero/function/kCLge">
			<description>Change_in_lift_due_to_ground_effect</description>
			<table>
				<independentVar>aero/h_b-mac-ft</independentVar>
				<tableData>
					0.0000	1.2000
					0.1000	1.3200
					0.1500	1.3600
					0.2000	1.4000
					1.1000	1.2000
					1.5000  1.0000
				</tableData>
			</table>
		</function>-->

	  <function name="aero/alpha-wing-deg">
	    <todegrees><property>aero/alpha-wing-rad</property></todegrees>
	  </function>

	  <function name="aero/alpha-hstab-deg">
	    <sum>
	      <property>aero/alpha-wing-deg</property>
	      <value>-4.22</value>
	    </sum>
	  </function>

	  <axis name="LIFT">
	    <function name="aero/coefficient/CL_alpha"><!-- NACA 0064_212 -->
	      <description>Lift_due_to_alpha</description>
	      <table>
		<independentVar lookup="row">aero/alpha-wing-deg</independentVar>
		<independentVar lookup="column">aero/Re</independentVar>
		<tableData>
		  50000	100000	200000	500000	1000000
		  -180.00	0	0	0	0	0
		  -174.50	0.276675	0.26719	0.403211	0.172819	0.26096
		  -169.00	0.55335	0.53438	0.708053	0.345639	0.52192
		  -147.75	0.508967	0.503889	0.546319	0.494739	0.629877
		  -118.57	0.398697	0.397716	0.406257	0.395079	0.421365
		  -84.75	-0.082895	-0.082861	-0.083143	-0.082822	-0.083674
		  -57.75	-0.431765	-0.430489	-0.441003	-0.429621	-0.46278
		  -27.93	-0.500485	-0.494224	-0.546381	-0.482727	-0.650856
		  -14.54	-0.514686	-0.500058	-0.621331	-0.463122	-0.854394
		  -11.75	-0.545148	-0.5271	-0.683561	-0.4586	-0.9856
		  -10.29	-0.515368	-0.5432	-0.464071	-0.786131	-0.919843
		  -6.75	-0.6313	-0.6439	-0.628	-0.5338	-0.5606
		  -1.50	-0.0463	-0.1222	-0.0008	0.0016	0.0028
		  3.75	0.2854	0.6223	0.5385	0.5879	0.5971
		  9.00	0.9694	0.9958	1.0186	1.0323	1.0817
		  14.25	0.739729	0.718331	0.895165	0.9801	1.2591
		  32.25	0.727096	0.719842	0.780455	0.70677	0.899824
		  61.43	0.569567	0.568165	0.580367	0.564399	0.60195
		  95.25	-0.082895	-0.082861	-0.083143	-0.082822	-0.083674
		  122.25	-0.431765	-0.430489	-0.440908	-0.429621	-0.46278
		  152.07	-0.500485	-0.494224	-0.546418	-0.482727	-0.650856
		  169.46	-0.529994	-0.511825	-0.719686	-0.33105	-0.499891
		  175.00	-0.251523	-0.2429	-0.366555	-0.157108	-0.237236
		  180.00	0	0	0	0	0
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		</tableData>
	      </table>
	    </function>

	    <function name="aero/coefficient/CL_alpha_hstab"><!--NACA0012-->
	      <description>Lift_due_to_alpha horizontal stabilizer</description>
	      <table>
		<independentVar lookup="row">aero/alpha-hstab-deg</independentVar>
		<independentVar lookup="column">aero/Re</independentVar>
		<tableData>
		  50000	100000	200000	500000	1000000
		  -180.00	0.00000	0.00000	0.00000	0.00000	0.00000
		  -176.16	0.17935	0.17935	0.22221	0.22221	0.17935
		  -172.32	0.35870	0.35870	0.44442	0.44442	0.35870
		  -154.04	0.47576	0.47576	0.45587	0.45587	0.47576
		  -123.96	0.44290	0.44290	0.43783	0.43783	0.44290
		  -90.00	0.00000	0.00000	0.00000	0.00000	0.00000
		  -56.04	-0.44290	-0.44290	-0.43826	-0.43826	-0.44290
		  -26.75	-0.47830	-0.47830	-0.45931	-0.45931	-0.47830
		  -9.89	-0.60432	-0.60432	-0.46444	-0.46444	-0.60432
		  -8.25	-0.75330	-0.75330	-0.66673	-0.66673	-0.75330
		  -5.50	-0.60010	-0.60010	-0.58570	-0.58570	-0.60010
		  -2.75	-0.31450	-0.31450	-0.32650	-0.32650	-0.31450
		  0.00	0.00000	0.00000	0.00000	0.00000	0.00000
		  2.75	0.31430	0.31430	0.32630	0.32630	0.31430
		  5.50	0.60010	0.60010	0.58580	0.58580	0.60010
		  8.25	0.73156	0.73156	0.70620	0.70620	0.73156
		  33.39	0.71051	0.71051	0.68953	0.68953	0.71051
		  66.71	0.48339	0.48339	0.48164	0.48164	0.48339
		  101.32	-0.17638	-0.17638	-0.17583	-0.17583	-0.17638
		  130.75	-0.48196	-0.48196	-0.47713	-0.47713	-0.48196
		  163.59	-0.45665	-0.45665	-0.42584	-0.42584	-0.45665
		  173.32	-0.31199	-0.31199	-0.38654	-0.38654	-0.31199
		  176.96	-0.14181	-0.14181	-0.17570	-0.17570	-0.14181
		  180.00	0.00000	0.00000	0.00000	0.00000	0.00000
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		</tableData>
	      </table>
	    </function>

	    <function name="aero/coefficient/CL_elevator">
	      <description>Lift coefficieint given elevator deflection</description>
	      <table>
		<independentVar lookup="row">fcs/elevator-pos-deg</independentVar>
		<tableData>
		  -30.00	-0.15456
		  -29.00	-0.15512
		  -26.00	-0.15340
		  -23.00	-0.14699
		  -20.00	-0.13643
		  -17.00	-0.12227
		  -14.00	-0.10504
		  -11.00	-0.08528
		  -8.00	-0.06355
		  -5.00	-0.04037
		  -2.00	-0.01629
		  1.00	0.00815
		  4.00	0.03242
		  7.00	0.05596
		  10.00	0.07823
		  13.00	0.09871
		  16.00	0.11684
		  19.00	0.13208
		  22.00	0.14390
		  25.00	0.15176
		  28.00	0.15510
		  30.00	0.15456
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		</tableData>
	      </table>
	    </function>

	    <function name="aero/force/Lift_alpha">
	      <description>Lift_due_to_alpha</description>
	      <product>
		<property>aero/qbar-psf</property>
		<property>metrics/Sw-sqft</property>
		<value>0.43</value>
		<sum>
		  <property>aero/coefficient/CL_alpha</property>
		  <!--<property>aero/coefficient/CL_flaps</property>-->
		  <v>0</v>
		</sum>
	      </product>
	    </function>

	    <function name="aero/force/Lift_alpha_hstab">
	      <description>Lift_due_to_alpha_hstab</description>
	      <product>
		<property>aero/qbar-psf</property>
		<property>metrics/Sh-sqft</property>
		<sum>
		  <property>aero/coefficient/CL_alpha_hstab</property>
		  <property>aero/coefficient/CL_elevator</property>
		</sum>
	      </product>
	    </function>
	  </axis>

	  <axis name="DRAG">
	    <function name="aero/coefficient/CD_alpha">
	      <description>Drag due to alpha</description>
	      <table>
		<independentVar lookup="row">aero/alpha-wing-deg</independentVar>
		<independentVar lookup="column">aero/Re</independentVar>
		<tableData>
		  50000	100000	200000	500000	1000000
		  -180.00	0.058773	0.036117	0.012563	0.073584	0.001
		  -174.50	0.070353	0.047801	0.024396	0.085167	0.012522
		  -169.00	0.10466	0.08242	0.060974	0.119295	0.047624
		  -147.75	0.418018	0.398874	0.378521	0.430371	0.36779
		  -118.57	1.022677	1.011845	1.00095	1.028819	0.993775
		  -84.75	1.283773	1.2817	1.279473	1.285676	1.27925
		  -57.75	0.952851	0.940773	0.92813	0.961945	0.922458
		  -27.93	0.334917	0.314899	0.294503	0.349495	0.284311
		  -14.54	0.140668	0.118762	0.095718	0.151114	0.07254
		  -11.75	0.112298	0.090129	0.067745	0.10346	0.02969
		  -10.29	0.103424	0.1038	0.083229	0.046145	0.0208
		  -6.75	0.04227	0.03502	0.02561	0.01511	0.01187
		  -1.50	0.02703	0.02054	0.0118	0.00716	0.0056
		  3.75	0.03627	0.01981	0.01147	0.00769	0.00655
		  9.00	0.056	0.04587	0.03476	0.02302	0.01666
		  14.25	0.137758	0.115825	0.092511	0.09561	0.04864
		  32.25	0.418018	0.398874	0.378521	0.430371	0.36779
		  61.43	1.022677	1.011845	1.00095	1.028819	0.993775
		  95.25	1.283773	1.2817	1.2794	1.285676	1.27925
		  122.25	0.952851	0.940773	0.928059	0.961945	0.922458
		  152.07	0.334917	0.314899	0.294873	0.349495	0.284311
		  169.46	0.100965	0.078691	0.056468	0.115473	0.043704
		  175.00	0.068403	0.045833	0.022314	0.083182	0.010451
		  180.00	0.058773	0.036117	0.012563	0.073584	0.001
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		</tableData>
	      </table>
	    </function>

	    <function name="aero/coefficient/CD_alpha_hstab">
	      <description>Drag due to alpha horizontal stabilizer</description>
	      <table>
		<independentVar lookup="row">aero/alpha-hstab-deg</independentVar>
		<independentVar lookup="column">aero/Re</independentVar>
		<tableData>
		  50000	100000	200000	500000	1000000
		  -180.00	0.082019	0.082019	0.062341	0.062341	0.082019
		  -176.16	0.087618	0.087618	0.068016	0.068016	0.087618
		  -172.32	0.104314	0.104314	0.084844	0.084844	0.104314
		  -154.04	0.322646	0.322646	0.303314	0.303314	0.322646
		  -123.96	0.933189	0.933189	0.921404	0.921404	0.933189
		  -90.00	1.29	1.29	1.29	1.29	1.29
		  -56.04	0.933189	0.933189	0.921714	0.921714	0.933189
		  -26.75	0.335663	0.335663	0.317009	0.317009	0.335663
		  -9.89	0.106929	0.106929	0.100232	0.100232	0.106929
		  -8.25	0.06306	0.06306	0.078363	0.078363	0.06306
		  -5.50	0.01111	0.01111	0.02563	0.02563	0.01111
		  -2.75	0.00718	0.00718	0.00842	0.00842	0.00718
		  0.00	0.00338	0.00338	0.00728	0.00728	0.00338
		  2.75	0.00718	0.00718	0.00842	0.00842	0.00718
		  5.50	0.01111	0.01111	0.02564	0.02564	0.01111
		  8.25	0.060536	0.060536	0.08309	0.08309	0.060536
		  33.39	0.459238	0.459238	0.44373	0.44373	0.459238
		  66.71	1.119989	1.119989	1.11305	1.11305	1.119989
		  101.32	1.256386	1.256386	1.251865	1.251865	1.256386
		  130.75	0.793616	0.793616	0.781031	0.781031	0.793616
		  163.59	0.181643	0.181643	0.165237	0.165237	0.181643
		  173.32	0.098956	0.098956	0.079366	0.079366	0.098956
		  176.96	0.085531	0.085531	0.065872	0.065872	0.085531
		  180.00	0.082019	0.082019	0.062341	0.062341	0.082019
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		</tableData>
	      </table>
	    </function>

	    <function name="aero/coefficient/CD_beta_vstab">
	      <description>Drag due to beta vertical stabilizer</description>
	      <table>
		<independentVar lookup="row">aero/beta-deg</independentVar>
		<independentVar lookup="column">aero/Re</independentVar>
		<tableData>
		  50000	100000	200000	500000	1000000
		  -180.00	0.06667	0.03425	0.00439	0.00000	0.00100
		  -174.71	0.07734	0.04511	0.01540	0.21143	0.00100
		  -169.00	0.11330	0.08061	0.05128	0.38435	0.01855
		  -152.46	0.33482	0.30713	0.28125	0.23694	0.25101
		  -126.00	0.88264	0.86351	0.84602	0.29380	0.82710
		  -100.29	1.25893	1.25342	1.24862	0.33209	1.24355
		  -68.29	1.13668	1.12554	1.11504	0.26732	1.10130
		  -41.14	0.60893	0.58433	0.56173	0.14692	0.53685
		  -17.98	0.18847	0.15601	0.12899	0.01219	0.08732
		  -14.75	0.15014	0.11909	0.08903	-0.03420	0.02997
		  -8.75	0.10561	0.03367	0.02387	-0.00480	0.01307
		  -3.25	0.09685	0.01453	0.01118	-0.00220	0.00659
		  2.25	0.08810	0.01433	0.01075	0.00600	0.00593
		  7.50	0.07975	0.02598	0.01936	-0.00190	0.01149
		  13.75	0.14032	0.10859	0.07237	0.03350	0.02502
		  23.14	0.26199	0.23105	0.20507	-0.08575	0.17314
		  50.25	0.80517	0.78427	0.76494	-0.21575	0.74358
		  78.64	1.25310	1.24638	1.23997	-0.30474	1.23263
		  107.04	1.19881	1.18887	1.17946	-0.32835	1.16890
		  135.43	0.68284	0.65982	0.63856	-0.26832	0.61460
		  162.00	0.18871	0.15674	0.12921	-0.29476	0.09565
		  170.75	0.09918	0.06714	0.03774	-0.45830	0.00462
		  176.04	0.07272	0.04039	0.01056	-0.19821	0.00100
		  180.00	0.06667	0.03425	0.00439	0.00000	0.00100
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		</tableData>
	      </table>
	    </function>

	    <function name="aero/coefficient/CD_rudder">
	      <description>Drag coefficient given rudder deflection</description>
	      <table>
		<independentVar lookup="row">fcs/rudder-pos-deg</independentVar>
		<tableData>
		  -30	-0.253777
		  -20	-0.142857
		  -10	-0.045919
		  0	0.000000
		  10	0.045919
		  20	0.142857
		  30	0.253777
		</tableData>
	      </table>
	    </function>

	    <function name="aero/coefficient/CD_aileron">
	      <description>Drag coefficient given aileron deflection</description>
	      <table>
		<independentVar lookup="row">fcs/left-aileron-pos-deg</independentVar>
		<tableData>
		  -30	-0.000653221998
		  -20	-0.000367713918
		  -10	-0.000118195506
		  0	0
		  10	0.000118195506
		  20	0.000367713918
		  30	0.000653221998
		</tableData>
	      </table>
	    </function>

	    <function name="aero/coefficient/CD_elevator">
	      <description>Drag coefficient given elevator deflection</description>
	      <table>
		<independentVar lookup="row">fcs/elevator-pos-deg</independentVar>
		<tableData>
		  -30	-0.0097450368
		  -20	-0.0054857088
		  -10	-0.0017632896
		  0	0
		  10	0.0017632896
		  20	0.0054857088
		  30	0.0097450368
		</tableData>
	      </table>
	    </function>

	    <function name="aero/coefficient/CD_compressibility">
	      <description>Coefficient of drag due to compressibility (CL 0.2)</description>
	      <!-- dihedral 2 deg 20 min; sweep 20 deg -->
	      <table>
		<independentVar lookup="row">velocities/mach</independentVar>
		<tableData>
		  0.00000	0.000000
		  0.30000	0.000073
		  0.45034	0.000461
		  0.60067	0.001353
		  0.75101	0.004032
		  0.90134	0.011636
		  1.05168	0.032439
		  1.20201	0.035775
		  1.35235	0.030160
		  1.50268	0.023131
		  1.65302	0.018546
		  1.80336	0.015447
		  1.95369	0.012462
		  2.10403	0.010225
		  2.25436	0.008726
		  2.40470	0.007396
		  2.55503	0.006143
		  2.70537	0.004930
		  2.85570	0.003726
		  3.00604	0.002519
		  3.15638	0.001349
		  3.30671	0.000390
		  3.45705	0.000000
		  3.50000	0.000000
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		</tableData>
	      </table>
	    </function>

	    <function name="aero/coefficient/CD_compressibilityCL">
	      <description>Coefficient of compressibility drag due to Coefficient of lift</description>
	      <table>
		<independentVar lookup="row">aero/coefficient/CL_alpha</independentVar>
		<tableData>
		  0.00000	-0.00180
		  0.01327	-0.00186
		  0.02653	-0.00189
		  0.03980	-0.00189
		  0.05306	-0.00187
		  0.06633	-0.00182
		  0.07959	-0.00175
		  0.09286	-0.00165
		  0.10612	-0.00153
		  0.11939	-0.00139
		  0.13265	-0.00122
		  0.14592	-0.00102
		  0.15918	-0.00081
		  0.17245	-0.00057
		  0.18571	-0.00031
		  0.19898	-0.00002
		  0.21224	0.00028
		  0.22551	0.00061
		  0.23878	0.00096
		  0.25204	0.00132
		  0.26531	0.00171
		  0.27857	0.00211
		  0.29184	0.00252
		  0.30510	0.00295
		  0.31837	0.00340
		  0.33163	0.00385
		  0.34490	0.00433
		  0.35816	0.00481
		  0.37143	0.00532
		  0.38469	0.00585
		  0.39796	0.00641
		  0.41122	0.00701
		  0.42449	0.00765
		  0.43776	0.00830
		  0.45102	0.00897
		  0.46429	0.00963
		  0.47755	0.01030
		  0.49082	0.01098
		  0.50408	0.01168
		  0.51735	0.01240
		  0.53061	0.01314
		  0.54388	0.01391
		  0.55714	0.01471
		  0.57041	0.01553
		  0.58367	0.01638
		  0.59694	0.01723
		  0.61020	0.01810
		  0.62347	0.01896
		  0.63673	0.01981
		  0.65000	0.02064
		</tableData>
	      </table>
	    </function>

	    <function name="aero/force/Drag_alpha">
	      <description>Drag due to alpha</description>
	      <product>
		<property>aero/qbar-psf</property>
		<property>metrics/Sw-sqft</property>
		<value>0.57</value>
		<sum>
		  <property>aero/coefficient/CD_alpha</property>
		  <property>aero/coefficient/CD_aileron</property>
		  <property>aero/coefficient/CD_compressibility</property>
		  <property>aero/coefficient/CD_compressibilityCL</property>
		</sum>
	      </product>
	    </function>

	    <function name="aero/force/Drag_alpha_hstab">
	      <description>Drag due to alpha hstab</description>
	      <product>
		<property>aero/qbar-psf</property>
		<property>metrics/Sh-sqft</property>
		<sum>
		  <property>aero/coefficient/CD_alpha_hstab</property>
		  <property>aero/coefficient/CD_elevator</property>
		</sum>
	      </product>
	    </function>

	    <function name="aero/force/Drag_beta_vstab">
	      <description>Drag due to beta vstab</description>
	      <product>
		<property>aero/qbar-psf</property>
		<property>metrics/Sv-sqft</property>
		<sum>
		  <property>aero/coefficient/CD_beta_vstab</property>
		  <property>aero/coefficient/CD_rudder</property>
		</sum>
	      </product>
	    </function>

	    <!--
	    <function name="aero/force/Drag_gear">
	      <description>Drag due to gear</description>
	      <product>
		<property>aero/qbar-psf</property>
		<property>metrics/Sw-sqft</property>
		<property>gear/gear-pos-norm</property>
		<value>0.0050</value>
	      </product>
	    </function>

	    <function name="aero/force/Drag_flap">
	      <description>Drag due to flaps</description>
	      <product>
		<property>aero/qbar-psf</property>
		<property>metrics/Sw-sqft</property>
		<property>fcs/flap-pos-deg</property>
		<value>0.0012</value>
	      </product>
	    </function>
	    -->
	  </axis>

	  <axis name="SIDE">
	    <function name="aero/coefficient/CS_beta_vstab"><!-- NACA0006 -->
	      <description>Side due to beta vertical stabilizer</description>
	      <table>
		<independentVar lookup="row">aero/beta-deg</independentVar>
		<independentVar lookup="column">aero/Re</independentVar>
		<tableData>
		  50000	100000	200000	500000	1000000
		  -180.00	0.06667	0.03425	0.00439	0.00000	0.00100
		  -174.71	0.07734	0.04511	0.01540	0.21143	0.00100
		  -169.00	0.11330	0.08061	0.05128	0.38435	0.01855
		  -152.46	0.33482	0.30713	0.28125	0.23694	0.25101
		  -126.00	0.88264	0.86351	0.84602	0.29380	0.82710
		  -100.29	1.25893	1.25342	1.24862	0.33209	1.24355
		  -68.29	1.13668	1.12554	1.11504	0.26732	1.10130
		  -41.14	0.60893	0.58433	0.56173	0.14692	0.53685
		  -17.98	0.18847	0.15601	0.12899	0.01219	0.08732
		  -14.75	0.15014	0.11909	0.08903	-0.03420	0.02997
		  -8.75	0.10561	0.03367	0.02387	-0.00480	0.01307
		  -3.25	0.09685	0.01453	0.01118	-0.00220	0.00659
		  2.25	0.08810	0.01433	0.01075	0.00600	0.00593
		  7.50	0.07975	0.02598	0.01936	-0.00190	0.01149
		  13.75	0.14032	0.10859	0.07237	0.03350	0.02502
		  23.14	0.26199	0.23105	0.20507	-0.08575	0.17314
		  50.25	0.80517	0.78427	0.76494	-0.21575	0.74358
		  78.64	1.25310	1.24638	1.23997	-0.30474	1.23263
		  107.04	1.19881	1.18887	1.17946	-0.32835	1.16890
		  135.43	0.68284	0.65982	0.63856	-0.26832	0.61460
		  162.00	0.18871	0.15674	0.12921	-0.29476	0.09565
		  170.75	0.09918	0.06714	0.03774	-0.45830	0.00462
		  176.04	0.07272	0.04039	0.01056	-0.19821	0.00100
		  180.00	0.06667	0.03425	0.00439	0.00000	0.00100
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		</tableData>
	      </table>
	    </function>

	    <function name="aero/coefficient/CS_rudder">
	      <description>Side coefficient given rudder deflection</description>
	      <product>
		<property>fcs/rudder-pos-deg</property>
		<value>0.062722</value>
	      </product>
	    </function>

	    <function name="aero/force/Side_beta">
	      <description>Side due to beta vstab</description>
	      <product>
		<property>aero/qbar-psf</property>
		<property>metrics/Sv-sqft</property>
		<sum>
		  <property>aero/coefficient/CS_beta_vstab</property>
		  <property>aero/coefficient/CS_rudder</property>
		</sum>
		<v>-1</v>
	      </product>
	    </function>
	  </axis>

	  <axis name="PITCH">
	    <function name="aero/coefficient/CP_damper">
	      <description>Pitch coefficient given alpha</description>
	      <table>
		<independentVar lookup="row">aero/alpha-wing-deg</independentVar>
		<tableData>
		  -180.00	-1.81442
		  -179.00	-1.82193
		  -163.00	-1.26836
		  -147.00	-0.44534
		  -131.00	-0.24782
		  -115.00	-0.12512
		  -99.00	-0.00747
		  -83.00	-0.04895
		  -67.00	-0.30508
		  -51.00	-0.60623
		  -35.00	-1.02915
		  -19.00	-1.50127
		  -3.00	-1.80030
		  13.00	-1.70387
		  29.00	-1.28009
		  45.00	-0.96876
		  61.00	-0.47824
		  77.00	-0.15402
		  93.00	0.00849
		  109.00	-0.08819
		  125.00	-0.26638
		  141.00	-0.34687
		  157.00	-0.64880
		  173.00	-1.55266
		  180.00	-1.80030
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		  </tableData>
		</table>
	      </function>

	    <function name="aero/coefficient/CP_alpha">
	      <description>Pitch moment coefficient due to alpha</description>
	      <table>
		<independentVar lookup="row">aero/alpha-wing-deg</independentVar>
		<independentVar lookup="column">aero/Re</independentVar>
		<tableData>
		  50000	100000	200000	500000	1000000
		  -180.00	0	0	0	0	0
		  -174.50	0.22	0.22	0.22	0.22	0.22
		  -169.00	0.380548	0.382436	0.386488	0.385339	0.397996
		  -147.75	0.218253	0.235771	0.259918	0.266585	0.315035
		  -118.57	0.303317	0.319544	0.335713	0.348435	0.353056
		  -84.75	0.318858	0.332112	0.352317	0.352222	0.349165
		  -57.75	0.23297	0.240437	0.26261	0.258621	0.246088
		  -27.93	0.102228	0.106039	0.137104	0.117392	0.110555
		  -14.54	0.030621	0.014739	0.028888	0.012911	-0.031825
		  -11.75	0.0106	-0.014429	-0.010725	-0.0211	-0.0478
		  -10.29	7.7E-05	-0.023943	-0.032871	-0.047694	-0.039286
		  -6.75	-0.0339	-0.0291	-0.0305	-0.0461	-0.0401
		  -1.50	-0.0185	-0.0154	-0.0396	-0.0396	-0.0398
		  3.75	-0.0251	-0.0526	-0.0266	-0.0392	-0.042
		  9.00	-0.0053	-0.0111	-0.0168	-0.0212	-0.029
		  14.25	-0.042715	-0.032274	-0.0563	-0.0155	-0.001
		  32.25	-0.152143	-0.154038	-0.187379	-0.164346	-0.160548
		  61.43	-0.26688	-0.27454	-0.296892	-0.292185	-0.280474
		  95.25	-0.329749	-0.344709	-0.363799	-0.366876	-0.367258
		  122.25	-0.293336	-0.309716	-0.325835	-0.340142	-0.346485
		  152.07	-0.209912	-0.22778	-0.257813	-0.259814	-0.331318
		  169.46	-0.484222	-0.485234	-0.487404	-0.486789	-0.491422
		  175.00	-0.25	-0.25	-0.25	-0.25	-0.25
		  180.00	0	0	0	0	0
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		</tableData>
	      </table>
	    </function>

	    <function name="aero/coefficient/CP_alpha_hstab">
	      <description>Pitch moment coefficient due to alpha hstab</description>
	      <table>
		<independentVar lookup="row">aero/alpha-hstab-deg</independentVar>
		<independentVar lookup="column">aero/Re</independentVar>
		<tableData>
		  50000	100000	200000	500000	1000000
		  -180.00	0.00000	0.00000	0.00000	0.00000	0.00000
		  -176.16	0.15357	0.15357	0.15357	0.15357	0.15357
		  -172.32	0.30714	0.30714	0.30714	0.30714	0.30714
		  -154.04	0.18946	0.18946	0.17711	0.17711	0.18946
		  -123.96	0.28013	0.28013	0.27505	0.27505	0.28013
		  -90.00	0.32250	0.32250	0.32250	0.32250	0.32250
		  -56.04	0.22872	0.22872	0.22802	0.22802	0.22872
		  -26.75	0.10178	0.10178	0.10048	0.10048	0.10178
		  -9.89	0.02155	0.02155	0.00932	0.00932	0.02155
		  -8.25	-0.00390	-0.00390	-0.00410	-0.00410	-0.00390
		  -5.50	-0.00180	-0.00180	-0.00710	-0.00710	-0.00180
		  -2.75	0.00250	0.00250	0.00240	0.00240	0.00250
		  0.00	0.00000	0.00000	0.00000	0.00000	0.00000
		  2.75	-0.00240	-0.00240	-0.00240	-0.00240	-0.00240
		  5.50	0.00180	0.00180	0.00710	0.00710	0.00180
		  8.25	-0.00478	-0.00478	-0.00320	-0.00320	-0.00478
		  33.39	-0.16287	-0.16287	-0.16139	-0.16139	-0.16287
		  66.71	-0.28401	-0.28401	-0.28357	-0.28357	-0.28401
		  101.32	-0.32477	-0.32477	-0.32265	-0.32265	-0.32477
		  130.75	-0.25862	-0.25862	-0.25260	-0.25260	-0.25862
		  163.59	-0.29535	-0.29535	-0.28693	-0.28693	-0.29535
		  173.32	-0.33393	-0.33393	-0.33393	-0.33393	-0.33393
		  176.96	-0.15179	-0.15179	-0.15179	-0.15179	-0.15179
		  180.00	0.00000	0.00000	0.00000	0.00000	0.00000
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		</tableData>
	      </table>
	    </function>

	    <function name="aero/coefficient/CP_elevator">
	      <description>Pitch moment given elevator deflection</description>
	      <table>
		<independentVar lookup="row">fcs/elevator-pos-deg</independentVar>
		<tableData>
		  -30	0.338496
		  -25	0.321437
		  -17	0.260897
		  -9	0.173691
		  0	0.000000
		  7	-0.139818
		  14	-0.252249
		  20	-0.325761
		  30	-0.365808
		</tableData>
	      </table>
	    </function>

	    <function name="aero/moment/Pitch_alpha">
	      <description>Pitch moment due to alpha</description>
	      <product>
		<property>aero/qbar-psf</property>
		<property>metrics/Sw-sqft</property>
		<property>metrics/cbarw-ft</property>
		<property>aero/coefficient/CP_alpha</property>
		<v>-1</v>
	      </product>
	    </function>

	    <function name="aero/moment/Pitch_alpha_hstab">
	      <description>Pitch moment due to alpha hstab</description>
	      <product>
		<property>aero/qbar-psf</property>
		<property>metrics/Sh-sqft</property>
		<property>metrics/lh-ft</property>
		<sum>
		  <property>aero/coefficient/CP_alpha_hstab</property>
		  <property>aero/coefficient/CP_elevator</property>
		</sum>
	      </product>
	    </function>

	    <function name="aero/moment/Pitch_damper">
	      <description>Pitch due to pitch rate</description>
	      <product>
		<property>aero/qbar-psf</property>
		<property>metrics/Sw-sqft</property>
		<property>metrics/bw-ft</property>
		<property>aero/bi2vel</property>
		<property>aero/alphadot-rad_sec</property>
		<property>aero/coefficient/CP_damper</property>
	      </product>
	    </function>
	  </axis>

	  <axis name="ROLL">
	    <function name="aero/coefficient/CR_damper">
	      <description>Roll coefficient given beta</description>
	      <table>
		<independentVar lookup="row">aero/beta-deg</independentVar>
		<tableData>
		  -180.00	-0.92414
		  -179.00	-0.92285
		  -163.00	-0.75519
		  -147.00	-0.62306
		  -131.00	-0.36135
		  -115.00	-0.18984
		  -99.00	-0.05625
		  -83.00	-0.02041
		  -67.00	-0.18432
		  -51.00	-0.31795
		  -35.00	-0.53727
		  -19.00	-0.77450
		  -3.00	-0.91692
		  13.00	-0.85176
		  29.00	-0.64584
		  45.00	-0.47211
		  61.00	-0.23470
		  77.00	-0.11160
		  93.00	-0.00169
		  109.00	-0.15597
		  125.00	-0.29742
		  141.00	-0.50658
		  157.00	-0.74773
		  173.00	-0.90815
		  180.00	-0.92414
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		</tableData>
	      </table>
	    </function>

	    <function name="aero/coefficient/CR_aileron">
	      <description>Roll coefficient given aileron deflection</description>
	      <product>
		<property>fcs/left-aileron-pos-deg</property>
		<value>0.0035</value>
	      </product>
	    </function>

	    <function name="aero/coefficient/CR_beta_vstab">
	      <description>Roll coefficient due to beta vstab</description>
	      <table>
		<independentVar lookup="row">aero/beta-deg</independentVar>
		<tableData>
		  -40	0.041225
		  -30	0.039821
		  -25	0.034974
		  -20	0.029056
		  -15	0.022347
		  -10	0.015108
		  -5	0.007436
		  0	0.000000
		  5	-0.007436
		  10	-0.015108
		  15	-0.022347
		  20	-0.029056
		  25	-0.034974
		  30	-0.039821
		  40	-0.041225
		</tableData>
	      </table>
	    </function>

	    <function name="aero/coefficient/CR_rudder">
	      <description>Roll coefficient given rudder deflection</description>
	      <product>
		<property>fcs/rudder-pos-deg</property>
		<value>0.00003167560</value>
	      </product>
	    </function>

	    <function name="aero/moment/Roll_aileron">
	      <description>Roll moment due to aileron</description>
	      <product>
		<property>aero/qbar-psf</property>
		<property>metrics/Sw-sqft</property>
		<property>metrics/bw-ft</property>
		<property>aero/coefficient/CR_aileron</property>
	      </product>
	    </function>

	    <function name="aero/moment/Roll_beta_vstab">
	      <description>Roll moment vstab due to beta</description>
	      <product>
		<property>aero/qbar-psf</property>
		<property>metrics/Sv-sqft</property>
		<property>metrics/lv-ft</property>
		<sum>
		  <property>aero/coefficient/CR_beta_vstab</property>
		  <property>aero/coefficient/CR_rudder</property>
		</sum>
	      </product>
	    </function>

	    <function name="aero/moment/Roll_damper">
	      <description>Roll due to roll rate</description>
	      <product>
		<property>aero/qbar-psf</property>
		<property>metrics/Sw-sqft</property>
		<property>metrics/bw-ft</property>
		<property>aero/bi2vel</property>
		<property>velocities/phidot-rad_sec</property>
		<property>aero/coefficient/CR_damper</property>
	      </product>
	    </function>
	  </axis>

	  <axis name="YAW">
	    <function name="aero/coefficient/CY_damper">
	      <description>Yaw coefficient given alpha</description>
	      <table>
		<independentVar lookup="row">aero/alpha-deg</independentVar>
		<tableData>
		  -180.00	-0.41527
		  -179.00	-0.41469
		  -163.00	-0.33935
		  -147.00	-0.27998
		  -131.00	-0.16237
		  -115.00	-0.08534
		  -99.00	-0.04727
		  -83.00	0.00070
		  -67.00	-0.07952
		  -51.00	-0.14288
		  -35.00	-0.24143
		  -19.00	-0.34803
		  -3.00	-0.41202
		  13.00	-0.38275
		  29.00	-0.29021
		  45.00	-0.21215
		  61.00	-0.10547
		  77.00	-0.06170
		  93.00	0.00204
		  109.00	-0.06763
		  125.00	-0.13365
		  141.00	-0.22763
		  157.00	-0.33600
		  173.00	-0.40808
		  180.00	-0.41527
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		</tableData>
	      </table>
	    </function>

	    <function name="aero/coefficient/CY_aileron">
	      <description>Yaw coefficient given aileron deflection</description>
	      <product>
		<property>fcs/left-aileron-pos-deg</property>
		<value>0.0006</value>
	      </product>
	    </function>

	    <function name="aero/coefficient/CY_rudder">
	      <description>Yaw coefficient given rudder deflection without autocoordination</description>
	      <product>
		<property>fcs/rudder-pos-deg</property>
		<value>-0.01846678028</value>
	      </product>
	    </function>

	    <function name="aero/coefficient/CY_beta_vstab">
	      <description>Yaw coefficient due to beta vertical stab</description>
	      <table>
		<independentVar lookup="row">aero/beta-deg</independentVar>
		<independentVar lookup="column">aero/Re</independentVar>
		<tableData>
		  50000	100000	200000	500000	1000000
		  -180.00	0.00000	0.00000	0.00000	0.00000	0.00000
		  -174.71	0.21143	0.21143	0.21143	0.21143	0.21143
		  -169.00	0.38045	0.38165	0.38715	0.38435	0.39964
		  -152.46	0.21462	0.21599	0.25068	0.23694	0.32349
		  -126.00	0.29447	0.28243	0.28987	0.29380	0.30275
		  -100.29	0.34103	0.32731	0.32924	0.33209	0.33209
		  -68.29	0.28275	0.26345	0.25637	0.26732	0.24877
		  -41.14	0.16343	0.14249	0.13361	0.14692	0.12717
		  -17.98	0.05280	0.03533	0.01475	0.01219	-0.00885
		  -14.75	0.03117	0.01344	-0.01979	-0.03420	-0.03050
		  -8.75	-0.00446	-0.01340	-0.01120	-0.00480	0.00020
		  -3.25	-0.01055	0.01960	0.01720	-0.00220	-0.00530
		  2.25	-0.01096	-0.02720	-0.01520	0.00600	0.00340
		  7.50	-0.00026	0.00740	0.00490	-0.00190	-0.00670
		  13.75	-0.03025	-0.00093	0.03190	0.03350	0.02510
		  23.14	-0.10553	-0.08455	-0.06876	-0.08575	-0.04812
		  50.25	-0.23323	-0.21131	-0.20139	-0.21575	-0.19407
		  78.64	-0.31972	-0.30242	-0.29823	-0.30474	-0.29367
		  107.04	-0.33626	-0.32243	-0.32499	-0.32835	-0.32896
		  135.43	-0.26405	-0.25448	-0.26677	-0.26832	-0.28977
		  162.00	-0.28197	-0.28301	-0.31717	-0.29476	-0.41711
		  170.75	-0.46250	-0.46238	-0.46250	-0.45830	-0.46250
		  176.04	-0.19821	-0.19821	-0.19821	-0.19821	-0.19821
		  180.00	0.00000	0.00000	0.00000	0.00000	0.00000
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		</tableData>
	      </table>
	    </function>

	    <function name="aero/moment/Yaw_beta_vstab">
	      <description>Yaw moment due to beta vstab</description>
	      <product>
		<property>aero/qbar-psf</property>
		<property>metrics/Sv-sqft</property>
		<property>metrics/lv-ft</property>
		<sum>
		  <property>aero/coefficient/CY_beta_vstab</property>
		  <property>aero/coefficient/CY_rudder</property>
		</sum>
	      </product>
	    </function>

	    <function name="aero/moment/Yaw_aileron">
	      <description>Adverse yaw</description>
	      <product>
		<property>aero/qbar-psf</property>
		<property>metrics/Sw-sqft</property>
		<property>metrics/bw-ft</property>
		<property>aero/coefficient/CY_aileron</property>
	      </product>
	    </function>

	    <function name="aero/moment/Yaw_damper">
	      <description>Yaw due to yaw rate</description>
	      <product>
		<property>aero/qbar-psf</property>
		<property>metrics/Sw-sqft</property>
		<property>metrics/bw-ft</property>
		<property>aero/bi2vel</property>
		<property>velocities/r-rad_sec</property>
		<property>aero/coefficient/CY_damper</property>
	      </product>
	    </function>
	    <!-- Stall initiator -->
	    <!--
	    <function name="aero/moment/Yaw_alpha">
	      <description>Yaw moment due to alpha</description>
	      <product>
		<property>aero/qbar-psf</property>
		<property>metrics/Sw-sqft</property>
		<property>metrics/bw-ft</property>
		<property>aero/alpha-wing-rad</property>
		<property>fcs/gear-no-wow</property>
		<table>
		  <independentVar lookup="row">aero/beta-rad</independentVar>
		  <independentVar lookup="column">aero/Re</independentVar>
		  <tableData>
		    79088544	86997400
		    -0.3491 	-1.0000 	 0.0000
		    0.3491  	 1.0000  	 0.0000
		  </tableData>
		</table>
	      </product>
	    </function>
	    -->
	  </axis>
	</aerodynamics>

                <external_reactions>
		</external_reactions>
</fdm_config>
